# Worksheet setting: ORIGIN = 1
Norm(μ, σ, x) := 1/(σ*sqrt(2*π))*e^(-(x - μ)^2/(2*σ^2))
f_1(y) := Norm(μ_1, σ_1, y)
NormV(μ_x, μ_y, σ_x, σ_y, r, x, y) := 1/(2*π*σ_x*σ_y*sqrt(1 - r^2))*e^(-1/(2*(1 - r^2))*((x - μ_x)^2/σ_x^2 - 2*r*(x - μ_x)*(y - μ_y)/(σ_x*σ_y) + (y - μ_y)^2/σ_y^2))
f_.2(y) := Norm(μ_2, σ_2, y)
f_3(y) := Norm(μ_3, σ_3, y)
f_.4(y) := Norm(μ_4, σ_4, y)
r_kb := a*σ_1*(a*x_1 + 1) - a^2*x_1*σ_2 substitute, a == 1/(x_1 - x_2) →
μ_k := (μ_1 - μ_2)/(x_1 - x_2)
μ_b := x_1/(x_1 - x_2)*(μ_1 + μ_2) + μ_1
σ_k := (σ_1 + σ_2)/(x_1 - x_2)^2
σ_b := (x_1/(x_1 - x_2) + 1)^2*σ_1 + (x_1/(x_1 - x_2))^2*σ_2
f_1(k, b) := NormV(μ_k1, μ_b1, σ_k1, σ_b1, r_1, k, b)
f_2(k, b) := NormV(μ_k2, μ_b2, σ_k2, σ_b2, r_2, k, b)
k_1*x + b_1 == y
k_2*x + b_2 == y
NormV(μ_k1, (y - μ_b1)/x, σ_k1, σ_b1/x, -r_1, k_1, k_1)/x → e^(((k_1 - μ_k1)^2/σ_k1^2 + x^2*(k_1 + (μ_b1 - y)/x)^2/σ_b1^2 + 2*r_1*x*(k_1 - μ_k1)*(k_1 + (μ_b1 - y)/x)/(σ_b1*σ_k1))/(2*r_1^2 - 2))/(2*π*σ_b1*σ_k1*sqrt(1 - r_1^2))
f_t(x, y) := integral(integral(f_1(k_1, y - k_1.*x)*f_2(k_2, y - k_2*x), k_1 = -∞ .. ∞), k_2 = -∞ .. ∞)
f_t(x, y) := integral(f_2(k_2, y - k_2*x)*integral(f_1(k_1, y - k1*x), k_1 = -∞ .. ∞), k_2 = -∞ .. ∞)
((k_1 - μ_k1)^2/σ_k1^2 + (μ_b1 - y + k_1*x)^2/σ_b1^2 + 2*(k_1 - μ_k1)*(μ_b1 - y + k_1*x)/(σ_b1*σ_k1) + (2*r_1 - 2)*(k_1 - μ_k1)*(μ_b1 - y + k_1*x)/(σ_b1*σ_k1))/(2*r_1^2 - 2) coeffs, k_1; simplify → [
    (σ_b1^2*μ_k1^2 - 2*r_1*σ_b1*σ_k1*μ_b1*μ_k1 + 2*r_1*σ_b1*σ_k1*μ_k1*y + σ_k1^2*μ_b1^2 - 2*σ_k1^2*μ_b1*y + σ_k1^2*y^2)/(2*σ_b1^2*σ_k1^2*(r_1^2 - 1));
    -(σ_b1^2*μ_k1 - σ_k1^2*μ_b1*x + σ_k1^2*x*y - r_1*σ_b1*σ_k1*μ_b1 + r_1*σ_b1*σ_k1*y + r_1*σ_b1*σ_k1*μ_k1*x)/(σ_b1^2*σ_k1^2*(r_1^2 - 1));
    (σ_b1^2 + 2*r_1*σ_b1*σ_k1*x + σ_k1^2*x^2)/(2*σ_b1^2*σ_k1^2*(r_1^2 - 1))
]
f_1(k_1, y - k1*x) := 1/(2*π*σ_b1*σ_k1*sqrt(1 - r_1^2))*e^(((k_1 - μ_k1)^2/σ_k1^2 + (μ_b1 - y + k_1.*x)^2/σ_b1^2 + 2*r_1*(k_1 - μ_k1)*(μ_b1 - y + k_1.*x)/(σ_b1*σ_k.1))/(2*r_1^2 - 2))  # error: Здесь необходимо указать имя.
σ_b1^2 + 2*r_1*σ_b1*σ_k1*x + σ_k1^2*x^2 > 0
integral(f_1(k_1, y - k1*x), k_1 = -∞ .. ∞) := sqrt(2)*e^((μ_b1 - y + k1*x)^2/(2*σ_b1^2))*sqrt(σ_k1^2*(r_1^2 - 1))/(2*sqrt(π)*σ_b1*σ_k1*sqrt(1 - r_1^2))  # error: Здесь необходимо указать имя.
1/(2*π*σ_b1*σ_k1*sqrt(1 - r_1^2))*sqrt(π/A)*e^((B^2 - 4 A*C)/(4 A)) substitute, A == -(σ_b1^2 + 2*r_1*σ_b1*σ_k1*x + σ_k1^2*x^2)/(2*σ_b1^2*σ_k1^2*(r_1^2 - 1)), B == -((σ_b1^2*μ_k1 - σ_k1^2*μ_b1*x + σ_k1^2*x*y - r_1*σ_b1*σ_k1*μ_b1 + r_1*σ_b1*σ_k1*y + r_1*σ_b1*σ_k1*μ_k1*x)/(σ_b1^2*σ_k1^2*(r_1^2 - 1))), C == (-(σ_b1^2*μ_k1^2 - 2*r_1*σ_b1*σ_k1*μ_b1*μ_k1 + 2*r_1*σ_b1*σ_k1*μ_k1*y + σ_k1^2*μ_b1^2 - 2*σ_k1^2*μ_b1*y + σ_k1^2*y^2)/(2*σ_b1^2*σ_k1^2*(r_1^2 - 1))) → sqrt(2)*e^(-(μ_b1 - y + μ_k1*x)^2/(2*σ_b1^2 + 4*r_1*σ_b1*σ_k1*x + 2*σ_k1^2*x^2))*sqrt(-σ_b1^2*σ_k1^2*(r_1^2 - 1)/(σ_b1^2 + 2*r_1*σ_b1*σ_k1*x + σ_k1^2*x^2))/(2*sqrt(π)*σ_b1*σ_k1*sqrt(1 - r_1^2))
integral(f_1(k_1, y - k1*x), k_1 = -∞ .. ∞) := 1/(sqrt(2*π)*sqrt(σ_b1^2 + 2*r_1*σ_b1*σ_k1*x + σ_k1^2*x^2))*e^(-(μ_b1 - y + μ_k1*x)^2/(2*σ_b1^2 + 4*r_1*σ_b1*σ_k1*x + 2*σ_k1^2*x^2))  # error: Здесь необходимо указать имя.
σ'_1 := sqrt(σ_b1^2 + 2*r_1*σ_b1*σ_k1*x + σ_k1^2*x^2)
integral(f_1(k_1, y - k1*x), k_1 = -∞ .. ∞) := 1/(sqrt(2*π)*σ'_1)*e^(-(μ_b1 - y + μ_k1*x)^2/(2*σ'_1^2))  # error: Здесь необходимо указать имя.
σ'_2 := sqrt(σ_b2^2 + 2*r_2*σ_b2*σ_k2*x + σ_k2^2*x^2)
integral(f_2(k_2, y - k_2.*x), k_2 = -∞ .. ∞) := 1/(sqrt(2*π)*σ'_2)*e^(-(μ_b2 - y + μ_k2*x)^2/(2*σ'_2^2))  # error: Здесь необходимо указать имя.
f_t(x, y) := 1/(2*π*σ'_1*σ'_2)*e^(-((μ_b1 - y + μ_k1*x)^2/(2*σ'_1^2) + (μ_b2 - y + μ_k2*x)^2/(2*σ'_2^2)))
integral(integral(f_t(x, y), x = x_2 .. x), y = y_2 .. y)
# Данный закон - нихуя не канонический, и даже не нормальный :)
# Аффинное преобразование от целевых координат к координатам облака рассеивания:
M := [μ_k1, -1; μ_k2, -1]
b := [μ_b1; μ_b2]
M*[x; y] + b → [μ_b1 - y + μ_k1*x; μ_b2 - y + μ_k2*x]
# Матрица обратного преобразования
b' := [(M[1, 2]*b[2] - M[2, 2]*b[1])/|M|; (M[2, 1]*b[1] - M[1, 1]*b[2])/|M|]
b' → [-(μ_b1 - μ_b2)/(μ_k1 - μ_k2); -(μ_b1*μ_k2 - μ_b2*μ_k1)/(μ_k1 - μ_k2)]
M' := [M[2, 2]/|M|, -M[1, 2]/|M|; -M[2, 1]/|M|, M[1, 1]/|M|]
# Выразим функцию осей фигуры в координатах центра эллипса
x := (x' - y' - μ_b1 + μ_b2)/(μ_k1 - μ_k2)
# Таким образом, фигура облака вероятности имеет форму с центром в :
0, 0
# и осями
σ_b1^2 + 2*r_1*σ_b1*σ_k1*x + σ_k1^2*x^2 → σ_b1^2 + σ_k1^2*(μ_b1 - μ_b2 - x' + y')^2/(μ_k1 - μ_k2)^2 - 2*r_1*σ_b1*σ_k1*(μ_b1 - μ_b2 - x' + y')/(μ_k1 - μ_k2)
σ_b2^2 + 2*r_2*σ_b2*σ_k2*x + σ_k2^2*x^2 → σ_b2^2 + σ_k2^2*(μ_b1 - μ_b2 - x' + y')^2/(μ_k1 - μ_k2)^2 - 2*r_2*σ_b2*σ_k2*(μ_b1 - μ_b2 - x' + y')/(μ_k1 - μ_k2)
σ_xv := M'*[σ'_1; 0] + b'
σ_xv → [
    sqrt(σ_b1^2 + 2*r_1*σ_b1*σ_k1*x + σ_k1^2*x^2)/(μ_k1 - μ_k2) - (μ_b1 - μ_b2)/(μ_k1 - μ_k2);
    μ_k2*sqrt(σ_b1^2 + 2*r_1*σ_b1*σ_k1*x + σ_k1^2*x^2)/(μ_k1 - μ_k2) - (μ_b1*μ_k2 - μ_b2*μ_k1)/(μ_k1 - μ_k2)
]
σ_yv := M'*[0; σ'_2] + b'
σ_x := σ_xv*σ_xv
σ_yv → [
    -(μ_b1 - μ_b2)/(μ_k1 - μ_k2) - sqrt(σ_b2^2 + 2*r_2*σ_b2*σ_k2*x + σ_k2^2*x^2)/(μ_k1 - μ_k2);
    -(μ_b1*μ_k2 - μ_b2*μ_k1)/(μ_k1 - μ_k2) - μ_k1*sqrt(σ_b2^2 + 2*r_2*σ_b2*σ_k2*x + σ_k2^2*x^2)/(μ_k1 - μ_k2)
]
σ_y := σ_yv*σ_yv
r := σ_xv[1]/(σ_xv[2]*(1 - σ_xv[1]^2/σ_xv[2]^2))*(σ_x^2 - σ_y^2)/(σ_x*σ_x)
